<Lems>
  <Target component="sim"/>

  <Include file="NeuroMLCoreDimensions.xml"/>
  <Include file="Cells.xml"/>
  <Include file="Inputs.xml"/>
  <Include file="Networks.xml"/>
  <Include file="Simulation.xml"/>

  <Include file="if_gl_small_dummy_synapses.net.nml"/>

  <Simulation id="sim" length="1 s" step="0.025 ms" target="network_if_gl">
    <Display id="GrCs_v" title="GrCs, VOLTAGE" timeScale="1ms" xmin="-10.0" xmax="520.0" ymin="-80.0" ymax="-35.0">
      <Line id="GrCs[0]" timeScale="1ms"
	    quantity="GrCs/0/IaF_GrC/v" scale="1 mV"
	    color="#000000"/>
    </Display>

    <Display id="MFs_i" title="MFs, i" timeScale="1ms" xmin="-10.0" xmax="520.0" ymin="-0.5" ymax="1.5">
      <Line id="MF[0]" timeScale="1ms"
	    quantity="MFs/0/relayMF/spiking" scale="1"
	    color="#000000"/>
      <Line id="MF[1]" timeScale="1ms"
	    quantity="MFs/1/relayMF/spiking" scale="1"
	    color="#0000FF"/>
      <Line id="MF[2]" timeScale="1ms"
	    quantity="MFs/2/relayMF/spiking" scale="1"
	    color="#00FF00"/>
      <Line id="MF[3]" timeScale="1ms"
	    quantity="MFs/3/relayMF/spiking" scale="1"
	    color="#FF0000"/>
    </Display>

  </Simulation>

</Lems>
